## Well-conditioned function
f_well(x_1, x_2) := 0.8*x_1^2 + 1.2*x_2^2 + 0.4*x_1*x_2
f_well_grad_x1(x_1, x_2) := 1.6*x_1 + 0.4*x_2
f_well_grad_x2(x_1, x_2) := 0.4*x_1 + 2.4*x_2
d/dx_1(f_well(x_1, x_2))/f_well_grad_x1(x_1, x_2) simplify → 1
d/dx_2(f_well(x_1, x_2))/f_well_grad_x2(x_1, x_2) simplify → 1
## Poorly-conditioned function
f_poor(x_1, x_2) := 2*x_1^2 + 205*x_2^2 - 10*x_1*x_2 + 20*x_1 + 30*x_2 + 23
f_poor_grad_x1(x_1, x_2) := 4*x_1 - 10*x_2 + 20
f_poor_grad_x2(x_1, x_2) := -10*x_1 + 410*x_2 + 30
d/dx_1(f_poor(x_1, x_2))/f_poor_grad_x1(x_1, x_2) simplify → 1
d/dx_2(f_poor(x_1, x_2))/f_poor_grad_x2(x_1, x_2) simplify → 1
## Rosenbrock function
f_rozen(x_1, x_2) := (1 - x_1)^2 + 100*(x_2 - x_1^2)^2
f_rozen_grad_x1(x_1, x_2) := 400*x_1^3 + 2*x_1 - 400*x_1*x_2 - 2
f_rozen_grad_x2(x_1, x_2) := -200*x_1^2 + 200*x_2
d/dx_1(f_rozen(x_1, x_2))/f_rozen_grad_x1(x_1, x_2) simplify → 1
d/dx_2(f_rozen(x_1, x_2))/f_rozen_grad_x2(x_1, x_2) simplify → 1
